# OpenSim document version 40000
AnalyzeTool ellipseModel:
  model_file: results/eolo_initial.osim
  replace_force_set: false
  results_directory: results
  output_precision: 8
  initial_time: 0
  final_time: 1.9
  solve_for_equilibrium_for_auxiliary_states: false
  maximum_number_of_integrator_steps: 20000
  maximum_integrator_step_size: 1
  minimum_integrator_step_size: 1e-8
  integrator_error_tolerance: 1e-5
  datafile: results/eolo_forces.sto
  states_file: results/eolo_states.sto
  lowpass_cutoff_frequency_for_coordinates: -1
  AnalysisSet Analyses:
    BodyKinematics: start_time=0 end_time=1.9 step_interval=1 in_degrees=true bodies=all
        express_results_in_body_local_frame=false
  ControllerSet Controllers:
    ControlSetController: controls_file=results/eolo_controls.sto
