# OpenSim document version 40000
AnalyzeTool EHA30.0.0:
  model_file: ellipse.osim
  replace_force_set: true
  force_set_files: actuators.xml
  results_directory: Analyzes
  output_precision: 8
  initial_time: 0
  final_time: 1.9
  solve_for_equilibrium_for_auxiliary_states: true
  maximum_number_of_integrator_steps: 20000
  maximum_integrator_step_size: 1
  minimum_integrator_step_size: 1e-8
  integrator_error_tolerance: 1e-5
  datafile: ../results/GRF0.0.0.sto
  states_file: ../Analyzes/traj30.0.0.sto
  lowpass_cutoff_frequency_for_coordinates: -1
  AnalysisSet Analyses:
    BodyKinematics: start_time=0 end_time=1.9 step_interval=1 in_degrees=false bodies=all
        express_results_in_body_local_frame=false
    MuscleAnalysis: start_time=-infinity end_time=infinity step_interval=1 in_degrees=true muscle_list=knee_spring
        moment_arm_coordinate_list=q2_rot compute_moments=false
    JointReaction: start_time=0 end_time=1.9 step_interval=1 in_degrees=true joint_names=ALL apply_on_bodies=child
        express_in_frame=child
    ForceReporter: start_time=0 end_time=1.9 step_interval=1 in_degrees=true include_constraint_forces=false
    StatesReporter: start_time=0 end_time=1.9 step_interval=1 in_degrees=true
    OutputReporter: output_paths=(am|tou am|qfac am|act am|power am|opt km|tou km|qfac km|act km|power km|opt hm|tou hm|qfac hm|act hm|power hm|opt ap|tou ap|qfac ap|act ap|power ap|opt kp|tou kp|qfac kp|act kp|power kp|opt hp|tou hp|qfac hp|act hp|power hp|opt forceset/knee_spring|stretch forceset/hip_spring|stretch forceset/ankle_spring|stretch)
        start_time=0 end_time=1.9 step_interval=1 in_degrees=true
  ControllerSet Controllers:
    ControlSetController: controls_file=../Analyzes/traj30.0.0.sto
